// COMSOL Multiphysics 6.2.0.290 model "single_calandria.mph"
// Outline of the model tree

Parameters
  k_Nb = 52.335[W/(m*K)]  // Thermal Conductivity Of Niobium
  rho_Nb = 8.57e3[kg/m^3]  // Density Of Niobium
  Cp_Nb = 2.7e2[J/(kg*K)]  // Heat Capacity Of Nb
  T_0 = 760  // Boundary Temperature
  q_0 = 5e5[W/m^2]  // Heat Flux

Geometry
  geom1 "Geometry 1" (2D axisymmetric, length unit m)
    r1: Rectangle | pos = {2e-2, 0}; size = {8e-2, 1.4e-1}
    pt1: Point | p = {2e-2, 4e-2}
    pt2: Point | p = {2e-2, 1e-1}
    fin: Finalize "Form Union"

Physics
  ht: HeatTransfer "Heat Transfer in Solids" on all domains
    dependent variable T
    solid1: SolidHeatTransferModel "Solid 1" (default)
      k_mat = userdef
      k = k_Nb
      rho_mat = userdef
      rho = rho_Nb
      Cp_mat = userdef
      Cp = Cp_Nb
    init1: init "Initial Values 1" (default) | Tinit = 760
    axi1: AxialSymmetry (default)
    ins1: ThermalInsulation (default)
    temp1: TemperatureBoundary "Temperature 1" on boundaries 2, 5, 6 | T0 = T_0
    hf1: HeatFluxBoundary "Heat Flux 1" on boundaries 3 | q0 = q_0

Mesh
  mesh1 "Mesh 1"
    size: MeshSizeDefault | hmax = 0.00938; hmin = 4.2E-5; hcurve = 0.3; hgrad = 1.3
    ftri1: FreeTri "Free Triangular 1" on remaining entities

Studies
  std1 "Study 1"
    stat: Stationary

Solver configurations
  sol1 "Solution 1" (study std1)
    v1: Variables "Dependent Variables 1"
    s1: Stationary "Stationary Solver 1"
      fc1: FullyCoupled | linsolver = d1; initstep = 0.01; minstep = 1.0E-6; maxiter = 50
      d1: Direct "Direct, heat transfer variables (ht)" | linsolver = pardiso; pivotperturb = 1.0E-13

Datasets
  dset1: Solution | solution = sol1
  rev1: Revolve2D "Revolution 2D" | data = dset1; startangle = -90; revangle = 225

Plots
  pg1: PlotGroup3D "Temperature, 3D (ht)" | data = rev1
    surf1: Surface | expr = T
  pg2: PlotGroup2D "Isothermal Contours (ht)" | data = dset1
    con1: Contour | expr = T